New "Monitor.battery3_states" element=Storage.battery3 mode=3
New "Monitor.battery18_states" element=Storage.battery18 mode=3
New "Monitor.battery35_states" element=Storage.battery35 mode=3
New "Monitor.battery48_states" element=Storage.battery48 mode=3
New "Monitor.battery61_states" element=Storage.battery61 mode=3
New "Monitor.battery73_states" element=Storage.battery73 mode=3
New "Monitor.battery87_states" element=Storage.battery87 mode=3
New "Monitor.battery101_states" element=Storage.battery101 mode=3
New "Monitor.battery116_states" element=Storage.battery116 mode=3
